OpenVSP model (file version 4), 3 components.
Geometry view with OpenVSP parameter names; values to 6 digits, angles in degrees, lengths in the model's unit.
Overall bounding box: X_Min=0 X_Len=330 Y_Min=-485.908 Y_Len=971.815 Z_Min=-30 Z_Len=117.01

Fuselage "FuselageGeom"
  location (X Y Z) 0 0 0, rotation 0 0 0
  bounding box size 300 64.4836 60
  Design: Length=300
  cross sections:
    n  XLocPercent  YLocPercent  ZLocPercent  shape
    0  0            0            0            circle Circle_Diameter=20
    1  0.414062     0            0            ellipse Ellipse_Height=60 Ellipse_Width=50
    2  1            0            0            ellipse Ellipse_Height=10 Ellipse_Width=20

Wing "WingGeom", child of "FuselageGeom"
  location (X Y Z) 70 0 25, rotation 0 0 0
  symmetric about XZ
  bounding box size 100.336 971.815 67.5156
  totals: TotalSpan=980.1 TotalProjectedSpan=971.815 TotalChord=75.0744 TotalArea=76295.2
  root: chord 100.297, twist 0, NACA 4-series Camber=0.0251259 CamberLoc=0.3 ThickChord=0.16
  sections:
    n  Span    Root_Chord  Tip_Chord  Area     Sweep  Sweep_Location  Dihedral  Twist  Twist_Location  tip airfoil
    1  290.05  100.297     80         26147.6  0      0               5         0      0.25            NACA 4-series Camber=0 CamberLoc=0.2 ThickChord=0.1
    2  200     80          40         12000    0      0               10        0      0.25            as above

Wing "WingGeom", child of "FuselageGeom"
  location (X Y Z) 250 0 0, rotation 0 0 0
  symmetric about XZ
  bounding box size 80 100 8.00255
  totals: TotalSpan=100 TotalProjectedSpan=100 TotalChord=50 TotalArea=5000
  root: chord 80, twist 0, NACA 4-series Camber=0 CamberLoc=0.2 ThickChord=0.1
  sections:
    n  Span  Root_Chord  Tip_Chord  Area  Sweep  Sweep_Location  Dihedral  Twist  Twist_Location  tip airfoil
    1  50    80          20         2500  50     0               0         0      0.25            as above
